<?xml version="1.0"?>
<?xml-stylesheet type="text/xsl" href="http://jsbsim.sourceforge.net/JSBSim.xsl"?>

 <external_reactions>

  <force name="hook" frame="BODY">
   <location unit="FT">
    <x> 47.6496 </x>
    <y> 0 </y>
    <z> -1.04724</z>
   </location>
   <direction>
    <x>-0.9995</x>
    <y> 0 </y>
    <z> 0.01 </z>
   </direction>
  </force>

  <property value="0">systems/chute/chute-reef-pos-norm</property>
  <property value="0">systems/chute/chute-size-factor</property>

  <force name="chute" frame="WIND">
   <function>
    <product>
     <property>aero/qbar-psf</property>
     <property>systems/chute/chute-reef-pos-norm</property>
     <property>systems/chute/chute-size-factor</property>
     <value> 0.9 </value>
     <value> 115 </value>
    </product>
   </function>
   <location unit="FT">
    <x> 47.6496 </x>
    <y> 0 </y>
    <z> 0 </z>
   </location>
   <direction>
    <x>-1 </x>
    <y> 0 </y>
    <z> 0 </z>
   </direction>
  </force>

 </external_reactions>
