<?xml version="1.0"?>
<?xml-stylesheet type="text/xsl" href="http://jsbsim.sourceforge.net/JSBSim.xsl"?>

 <propulsion>

   <engine file="EJ-200">
    <location unit="M">
      <x>    5.567780 </x>
      <y>   -0.530979 </y>
      <z>   -0.084237 </z>
    </location>
    <orient unit="DEG">
      <pitch>     0.00 </pitch>
       <roll>     0.00 </roll>
        <yaw>     0.00 </yaw>
    </orient>
    <feed> 10 </feed>

    <thruster file="direct">
     <sense> 1 </sense>
      <location unit="M">
        <x>    5.567780 </x>
        <y>   -0.530979 </y>
        <z>   -0.084237 </z>
     </location>
     <orient unit="DEG">
       <pitch>     0.00 </pitch>
        <roll>     0.00 </roll>
         <yaw>     0.00 </yaw>
     </orient>
    </thruster>
  </engine>

   <engine file="EJ-200">
    <location unit="M">
      <x>    5.567780 </x>
      <y>    0.530979 </y>
      <z>   -0.084237 </z>
    </location>
    <orient unit="DEG">
      <pitch>     0.00 </pitch>
       <roll>     0.00 </roll>
        <yaw>     0.00 </yaw>
    </orient>
    <feed> 11 </feed>

    <thruster file="direct">
     <sense> 1 </sense>
      <location unit="M">
        <x>    5.567780 </x>
        <y>    0.530979 </y>
        <z>   -0.084237 </z>
     </location>
     <orient unit="DEG">
       <pitch>     0.00 </pitch>
        <roll>     0.00 </roll>
         <yaw>     0.00 </yaw>
     </orient>
    </thruster>
  </engine>

<!--
tank list:
0 - forward transfer tank - 2028
1 - forward tank - 2095
2 - aft tank - 1962
3 - foreleft wing tank - 1080
4 - aftleft wing tank - 1080
5 - foreright wing tank - 1080
6 - aftright wing tank - 1080
7 - center drop tank
8 - left drop tank
9 - right drop tank
10 - left accumulator - 2
11 - right accumulator - 2
-->

  <!-- forward transfer -->
  <tank type="FUEL" number="0"> <!--  Tanks are at CG so they do not interfere with Aero tuning -->
     <location unit="M">
		<x> 0.90603 </x>
		<y> 0.0 </y>
		<z> -0.140554 </z>
     </location>
     <capacity unit="LBS"> 2094.00 </capacity>
     <contents unit="LBS"> 2094.00 </contents>
  </tank>
  <!-- forward -->
  <tank type="FUEL" number="1">
     <location unit="M">
		<x> 0.90603 </x>
		<y> 0.0 </y>
		<z> -0.140554 </z>
     </location>
     <capacity unit="LBS"> 2094.00 </capacity>
     <contents unit="LBS"> 2094.00 </contents>
  </tank>
  <!-- aft -->
  <tank type="FUEL" number="2">
     <location unit="M">
		<x> 0.90603 </x>
		<y> 0.0 </y>
		<z> -0.140554 </z>
     </location>
     <capacity unit="LBS"> 1962.00 </capacity>
     <contents unit="LBS"> 1962.00 </contents>
  </tank>
  <!-- foreleft -->
  <tank type="FUEL" number="2">
     <location unit="M">
    <x> 0.90603 </x>
    <y> 0.0 </y>
    <z> -0.140554 </z>
     </location>
     <capacity unit="LBS"> 1089.00 </capacity>
     <contents unit="LBS"> 1089.00 </contents>
  </tank>
  <!-- aftleft -->
  <tank type="FUEL" number="2">
     <location unit="M">
    <x> 0.90603 </x>
    <y> 0.0 </y>
    <z> -0.140554 </z>
     </location>
     <capacity unit="LBS"> 1089.00 </capacity>
     <contents unit="LBS"> 1089.00 </contents>
  </tank>
  <!-- foreright -->
  <tank type="FUEL" number="2">
     <location unit="M">
    <x> 0.90603 </x>
    <y> 0.0 </y>
    <z> -0.140554 </z>
     </location>
     <capacity unit="LBS"> 1089.00 </capacity>
     <contents unit="LBS"> 1089.00 </contents>
  </tank>
  <!-- aftright -->
  <tank type="FUEL" number="2">
     <location unit="M">
    <x> 0.90603 </x>
    <y> 0.0 </y>
    <z> -0.140554 </z>
     </location>
     <capacity unit="LBS"> 1089.00 </capacity>
     <contents unit="LBS"> 1089.00 </contents>
  </tank>
  <!-- center drop tank -->
  <tank type="FUEL" number="2">
     <location unit="M">
    <x> 0.90603 </x>
    <y> 0.0 </y>
    <z> -0.140554 </z>
     </location>
     <capacity unit="LBS"> 2640.0 </capacity>
     <contents unit="LBS"> 0.0 </contents>
  </tank>
  <!-- left drop tank -->
  <tank type="FUEL" number="2">
     <location unit="M">
    <x> 0.90603 </x>
    <y> 0.0 </y>
    <z> -0.140554 </z>
     </location>
     <capacity unit="LBS"> 1749.0 </capacity>
     <contents unit="LBS"> 0.0 </contents>
  </tank>
  <!-- right drop tank -->
  <tank type="FUEL" number="2">
     <location unit="M">
    <x> 0.90603 </x>
    <y> 0.0 </y>
    <z> -0.140554 </z>
     </location>
     <capacity unit="LBS"> 1749.0 </capacity>
     <contents unit="LBS"> 0.0 </contents>
  </tank>
  <!-- left accumulator -->
  <tank type="FUEL" number="2">
     <location unit="M">
    <x> 0.90603 </x>
    <y> 0.0 </y>
    <z> -0.140554 </z>
     </location>
     <capacity unit="LBS"> 2.0 </capacity>
     <contents unit="LBS"> 2.0 </contents>
  </tank>
  <!-- right accumulator -->
  <tank type="FUEL" number="2">
     <location unit="M">
    <x> 0.90603 </x>
    <y> 0.0 </y>
    <z> -0.140554 </z>
     </location>
     <capacity unit="LBS"> 2.0 </capacity>
     <contents unit="LBS"> 2.0 </contents>
  </tank>

 </propulsion>
